# AguaClara Water Treatment Plants
# Design References
# MathCAD dimension calculations:
# Use BasicClientInputs and ExpertClientInputs when this is run by LabVIEW.
# Use BasicInputs and ExpertInputs to use the program in MathCAD
# Change the reference by
# - right clicking
# - select properties
# - reference tab
# - type in the correct file name
# [reference: BasicInputs.xmcd]
# [reference: ExpertInputs.xmcd]
# [reference: DesignAssumptions.xmcd]
# [reference: MathFunctions.xmcd]
# [reference: PipeDatabase.xmcd]
# [reference: MinorLossCoefficients.xmcd]
# [reference: FluidsFunctions.xmcd]
# [reference: Sedimentation Tank.xmcd]
# [reference: Flocculator.xmcd]
# [reference: LFOM.xmcd]
# [reference: EntranceTankDim.xmcd]
# [reference: LinearCdc_app37.xmcd]
# [reference: ChemStorageCylinders.xmcd]
# [reference: Stacked Rapid Sand Filter.xmcd]
# [reference: Materials List.xmcd]
# AutoCAD drawing programs:
# Translators:
# These are the codes that take MathCAD outputs and create AutoCAD scripts that are used to draw the plant (formerly Basics)
# [reference: MtoATranslators.xmcd]
# The wrapped MtoA translator contains the functions that the user will want to access. These functions will draw pieces with full functionality - specifying the location, dimension, and orientation of the object. Also, it contains layer control and subtraction capabilities for grouped objects.
# [reference: MtoATranslators Wrapped.xmcd]
# Plant Elements:
# These are all of the files that draw the fundamental parts of the plants (tees, elbows, tanks, pipes, etc)
# [reference: Channel.xmcd]
# [reference: cross.xmcd]
# [reference: Sludge.xmcd]
# [reference: Manifold.xmcd]
# [reference: pipe.xmcd]
# [reference: elbow.xmcd]
# [reference: tank.xmcd]
# [reference: adapter.xmcd]
# [reference: Tee.xmcd]
# [reference: pvccap.xmcd]
# [reference: LaunderCap.xmcd]
# [reference: ChimneyStops.xmcd]
# [reference: laminaplain.xmcd]
# [reference: Stairs.xmcd]
# [reference: DrainChannel.xmcd]
# [reference: Manifold.xmcd]
# Specific Pieces:
# These are the codes that draw the bigger pieces of the plant (the sed tank, floc tank, etc)
# [reference: floctank.xmcd]
# [reference: SedTank- with pieces.xmcd]
# [reference: Entrance Tank.xmcd]
# [reference: Plant Drain Channel.xmcd]
# [reference: ChemStockCylinders.xmcd]
# [reference: SRSF.xmcd]
# [reference: Operator Access.xmcd]
# Layouts:
# This file will execute at the very end to create multiple views of the entire plant in paperspace
# [reference: Layouts.xmcd]
# Sedimentation
# Sed Tanks and Slopes:
N_SedTanks = 4
H_SedBetween = 0 cm  # Distance from the top of the inlet manifold to the bottom of the ledge supporting the lamella frame
L_Sed = 3.50095 m
N_SedBays = 1  # Number of bays of inlet manifolds in each sed tank
# Length of the port through which water exits the inlet manifold
# Width of ferrous cement plates in whice one manifold port is cut
Q_SedBay = 3 L/s
# Sedimentation Tank Sludge Drain:
N_SedSludgeOrifices = 35  # per cell
Ti_SludgeDrain = 30 min  # Tank Drain time
W_SedSludge = 9.62132 cm  # Width of the sludge channel
B_SedSludgeOrifices = 10 cm  # Distance center to center between drain orifices
# Depth of the sludge channel
H_SedSludge = 4.81066 cm
T_SedSludge = 5 cm
# Thickness of the plate topping the sludge channel
# through which drain holes are formed
T_SedSludge = 5 cm
W_SedDrainCover = 19.6213 cm
D_SedSludgeOrifice = 0.011 m  # Diameter of drain orifices
W_SedInletBottom = 0.441893 m
N_SedSludgeOrifices = 35
ND_SedSludgeValve = 2 in
# Sedimentation Tank Dimensions:
Z_SedSludge = 0.0981066 m  # Height from 0 of the top of the sludge drain
# Height from 0 of the top of the inlet manifold
Z_SedSlopes = 0.820187 m  # Total tank wall height
W_Sed = 1.08 m
L_Sed = 3.50095 m  # Total tank length
# Inlet Channel:
HW_InletChannel = 0.274357 m  # Width of the drop chimneys connecting channel to sed inlet manifolds
W_InletChannel = 0.446538 m  # length of drop chimmneys
L_Channel = 5.07 m
# per sed bay
N_SedInletPipes = 1
H_InletChannel = 0.374357 m
# Sedimentation Tank Effluent Launder:
N_SedLaunderOrifices = 44  # Number of orifices per launder  # More Launder Dimensions
ND_SedLaunder = 4 in
Q_SedLaunderOrifices = 7.12332e-5 m^3/s
# Center to center launder spacing
L_SedLaunder = 2.34327 m
B_SedLaunderOrifices = 0.0995006 m
D_SedLaunderOrifice = 0.511811 in
# Exit Channel:
W_ExitChannel = 0.3532 m
H_ExitChannel = 0.374357 m
L_ExitChannel = 5.07 m
H_PltWeir = 0.284357 m  # height of the weir carrying water to the distribution tank
HW_ExitChannel = 0.234357 m  # water height in exit channel from 0
# Lamella:
L_SedPlate = 0.609667 m  # center to center distance between lamella
B_SedPlate = 2.8064 cm  # spacing between lamella
S_SedPlate = 2.6064 cm
N_SedPlates = 70  # Number of Sed Plates per Sedimentation Tank Bay.
AN_SedPlate = 60 deg
V_SedC = 10.2367 m/day
L_SedActive = 2.26839 m
V_SedUp = 68.5528 m/day
Z_SedLaunder = 1.54358 m
H_SedPlate = 0.527987 m
H_SedAbove = 0.166043 m  # Height of water needed above the lamella
N_SedPlates = 70
HW_Sed = 1.65248 m
H_Sed = 1.75248 m
Z_Mp = 1.37812 m
H_SedBayDivider = 0.820187 m
# Flocculator
# Look at Flocculator Positioning arrays
W_FlocChannel = 0.54 m
# Fill last channel with bafffles from last channel
ED_Floc = 6 mW/kg
# Fix port width to be based on energy dissipation in that channel
# Adjust spacing after the number of baffles per channel is known.
HW_FlocEnd = 1.65248 m
# Check the residence time of the flocculator should be at least 20minutes
X_FlocBaffles = [
    0.191147, 0.191147, 0.191147, 0.191147, 0.316538;
    0.364295, 0.364295, 0.364295, 0.364295, 0.492494;
    0.537442, 0.537442, 0.537442, 0.537442, 0.668451;
    0.71059, 0.71059, 0.71059, 0.71059, 0.844408;
    0.883737, 0.883737, 0.883737, 0.883737, 1.02036;
    1.05688, 1.05688, 1.05688, 1.05688, 1.19632;
    1.23003, 1.23003, 1.23003, 1.23003, 1.37228;
    1.40318, 1.40318, 1.40318, 1.40318, 1.54823;
    1.57633, 1.57633, 1.57633, 1.57633, 1.72419;
    1.74947, 1.74947, 1.74947, 1.74947, 1.90015;
    1.92262, 1.92262, 1.92262, 1.92262, 2.07611;
    2.09577, 2.09577, 2.09577, 2.09577, 2.25206;
    2.26892, 2.26892, 2.26892, 2.26892, 2.42802;
    2.44206, 2.44206, 2.44206, 2.44206, 2.60398;
    2.61521, 2.61521, 2.61521, 2.61521, 2.77993;
    2.78836, 2.78836, 2.78836, 2.78836, 2.95589;
    2.96151, 2.96151, 2.96151, 2.96151, 3.13185;
    3.13465, 3.13465, 3.13465, 3.13465, 3.3078;
    3.3078, 3.3078, 3.3078, 3.3078, 0
] m
L_FlocBaffles = [
    1.39576, 1.39576, 1.39576, 1.39576, 1.6149;
    1.6149, 1.6149, 1.6149, 1.6149, 1.39576;
    1.39576, 1.39576, 1.39576, 1.39576, 1.6149;
    1.6149, 1.6149, 1.6149, 1.6149, 1.39576;
    1.39576, 1.39576, 1.39576, 1.39576, 1.6149;
    1.6149, 1.6149, 1.6149, 1.6149, 1.39576;
    1.39576, 1.39576, 1.39576, 1.39576, 1.6149;
    1.6149, 1.6149, 1.6149, 1.6149, 1.39576;
    1.39576, 1.39576, 1.39576, 1.39576, 1.6149;
    1.6149, 1.6149, 1.6149, 1.6149, 1.39576;
    1.39576, 1.39576, 1.39576, 1.39576, 1.6149;
    1.6149, 1.6149, 1.6149, 1.6149, 1.39576;
    1.39576, 1.39576, 1.39576, 1.39576, 1.6149;
    1.6149, 1.6149, 1.6149, 1.6149, 1.39576;
    1.39576, 1.39576, 1.39576, 1.39576, 1.6149;
    1.6149, 1.6149, 1.6149, 1.6149, 1.39576;
    1.39576, 1.39576, 1.39576, 1.39576, 1.6149;
    1.6149, 1.6149, 1.6149, 1.6149, 1.39576;
    1.39576, 1.39576, 1.39576, 1.39576, 0
] m
Z_FlocBaffles = [
    0, 0, 0, 0, 0.260935;
    0.256721, 0.256721, 0.256721, 0.256721, 0;
    0, 0, 0, 0, 0.260935;
    0.256721, 0.256721, 0.256721, 0.256721, 0;
    0, 0, 0, 0, 0.260935;
    0.256721, 0.256721, 0.256721, 0.256721, 0;
    0, 0, 0, 0, 0.260935;
    0.256721, 0.256721, 0.256721, 0.256721, 0;
    0, 0, 0, 0, 0.260935;
    0.256721, 0.256721, 0.256721, 0.256721, 0;
    0, 0, 0, 0, 0.260935;
    0.256721, 0.256721, 0.256721, 0.256721, 0;
    0, 0, 0, 0, 0.260935;
    0.256721, 0.256721, 0.256721, 0.256721, 0;
    0, 0, 0, 0, 0.260935;
    0.256721, 0.256721, 0.256721, 0.256721, 0;
    0, 0, 0, 0, 0.260935;
    0.256721, 0.256721, 0.256721, 0.256721, 0;
    0, 0, 0, 0, 0
] m
N_FlocChannels = 5
L_FlocTank = 17.5047 m
HL_Floc = 16.9149 cm
HW_FlocStart = 1.82163 m
S_FlocBaffle = [17.1147; 17.1147; 17.1147; 17.1147; 17.3957] cm
B_FlocBaffle = [17.3147; 17.3147; 17.3147; 17.3147; 17.5957] cm
N_FlocChannelBaffles = [19; 19; 19; 19; 18]
W_FlocPort = [0.171147; 0.171147; 0.171147; 0.171147; 0.182366] m
HL_FlocChannels = [3.4383; 3.4383; 3.4383; 3.4383; 3.16173] cm
L_FlocBaffleLower = 1.39576 m
L_FlocBaffleUpper = 1.6149 m
H_FlocPort = [0.54; 0.54; 0.54; 0.54; 0.5151] m
Ti_Floc = 21.6946 min  # residence time of the flocculator
N_FlocBaffles = 94
# Materials List
N_Launders = 4
L_LaunderPipeTotal = 9.37307 m
N_Valves = 4
N_LaunderCouplings = 4
N_ValveCouplings = 4
N_SedPlatesTotal = 280
N_SedPlatesPerSheet = 6
N_SedPlateSheets = 47
# AutoCAD Scripts
AC_SedTank =  # no stored result
AC_EntranceTank = [
    "-layer m Cdc"; "c t 129,0,129"; "Cdc"; "  "; "-insert CdcLeverArm.dwg"; "-3.6073,10.8328,2.28344 1 1 0"; "-insert CdcLeverArmBracket.dwg"; "-3.5753,10.42005,2.25854 1 1 0"; "-insert CdcCht.dwg"; "-4.3375,10.33595,2.37624 1 1 0"
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]
AC_FlocTank = [
    "-layer m FlocTank"; "c t 132,132,132"; "FlocTank"; "  "; "_-view o t _zoom w 0.16,4.76,0 -3.66095,8.38,1.92163 _box 0,4.92,0 -3.50095,8.22,1.92163 _box 0.15,4.77,-0.15 -3.65095,8.37,1.92163 _subtract 0.15,4.77,-0.15  0,4.92,0 "; "_box -3.65095,5.46,0 0.15,5.61,1.92163"; "-array l  R 4 1 0.69"; "-group c FlocTank y "; "all "; "-layer s 0"
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]
AC_ChemTanks = [
    "-layer m CoagTanks"; "c t 132,132,132"; "CoagTanks"; "  "; "_-view o t"; "_zoom w -5.0481,10.55215,1.33704 -4.2561,11.34415,2.58124"; "_cylinder -4.6521,10.94815,2.57124 0.386 c -5.8763,10.94815,2.57124"; "rotate3d l  y -4.6521,10.94815,2.57124 90"; "-group c CoagTanks y "; "all "
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]
AC_OperatorAccess =  # error: This variable is undefined.
AC_DrainChannel = [
    "-layer m DrainChannel"; "c t 214,214,214"; "DrainChannel"; "  "; "3dpoly"; "0.3,-1.125,-0.2024"; "0.3,-1.125,-0.27508"; "0.3,-0.725,-0.49776"; "0.3,-0.325,-0.27508"; "0.3,-0.325,-0.2024"
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]
AC_Filter =  # no stored result
# [component: inputs AC_Filter]
